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/batch
! ANSYS input file written by Workbench version 2026 R1
! File used for geometry attach: C:\Users\ricca\OneDrive - University of Pisa\III - Nonlinear analysis through FEM\7-Curve fitting\Workshop7A\WS4a-hyper_files\dp0\SYS\DM\SYS.agdb
/title,WS4a-hyper--Static Structural (A5)
/com,--- Data in consistent BIN units. See Solving Units in the help system for more information.
/units,BIN
/prep7
! Turn off shape checking because checks already performed inside WB mesher.
! See help system for more information.
SHPP,OFF,,NOWARN
etcon,set             ! allow ANSYS to choose best KEYOP's for 180x elements, resets any applicable keyopt to MAPDL defaults
/com,*********** Send User Defined Coordinate System(s) ***********
csys,0
/com,*********** Nodes for the whole assembly ***********
nblock,3,,3639
(1i9,3e20.9e3)
        1     2.209523755E+00     4.101049869E-01     1.476377953E-02
        2     2.155267982E+00     4.101049869E-01     1.476377953E-02
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-1
/com,*********** Elements for Body 1 'Solid' ***********
et,1,186
keyo,1,2,1          ! set full integration on SOLID186
MAT,1 $ TYPE,1 $ REAL,1 $ SECNUM,1 $ ESYS,0    ! ELEMNODES = 20
eblock,21,COMPACT,,120
(21i9)
        1        1      752      746      726      250      753      747      743      951     3011     2978      950     1925     3012     3004     1924      948     3022     3010     2977
        2        1      726      746      752      411      479      480      465      950     2978     3011      951     2291     2440     2412     2290      949     2441     2442     2413
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-1
secnum,1    ! reset the section ID to default
/com,*********** Elements for Body 2 'Solid' ***********
et,2,186
keyo,2,2,1          ! set full integration on SOLID186
MAT,2 $ TYPE,2 $ REAL,1 $ SECNUM,2 $ ESYS,0    ! ELEMNODES = 20
eblock,21,COMPACT,,264
(21i9)
      121       46      878      877      834      355      887      876      875     1145     3210     3146     1144     2161     3208     3206     2160     1142     3213     3207     3145
      122       46      834      877      878      488      613      640      641     1144     3146     3210     1145     2465     2734     2793     2466     1143     2735     2795     2797
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-1
secnum,1    ! reset the section ID to default
/com,*********** Elements for Body 3 'Solid' ***********
et,3,186
keyo,3,2,1          ! set full integration on SOLID186
MAT,3 $ TYPE,3 $ REAL,1 $ SECNUM,3 $ ESYS,0    ! ELEMNODES = 20
eblock,21,COMPACT,,144
(21i9)
      385      151      892      899      924      410      893      898      945     1590     3235     3244     1591     2286     3237     3243     2287     1588     3234     3242     3280
      386      151      924      899      892      642      707      719      720     1591     3244     3235     1590     2800     2939     2963     2801     1589     2940     2964     2966
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-1
secnum,1    ! reset the section ID to default
toffst,459.67,      ! Temperature offset from absolute zero
/com,*********** Set Reference Temperature ***********
tref,71.6
/com,*********** Send Materials ***********
MP,DENS,1,0.000734544492879577,	! slinch in^-3
MP,ALPX,1,6.66666666666667e-06,	! F^-1
MP,C,1,373722.969668162,	! in^2 s^-2 F^-1
MP,KXX,1,7.55607836445752,	! slinch in s^-3 F^-1
MP,RSVX,1,8.52348993288591,	! ohm cmil in^-1
MP,MURX,1,10000,

TB,HYPE,1,1,3,YEOH
TBDATA,1,101.1778793908,-35.5112881199046,18.3173066102531,0,0,0

MP,DENS,2,0.000734544492879577,	! slinch in^-3
MP,ALPX,2,6.66666666666667e-06,	! F^-1
MP,C,2,373722.969668162,	! in^2 s^-2 F^-1
MP,KXX,2,7.55607836445752,	! slinch in s^-3 F^-1
MP,RSVX,2,8.52348993288591,	! ohm cmil in^-1
MP,MURX,2,10000,

TB,HYPE,2,1,3,YEOH
TBDATA,1,101.1778793908,-35.5112881199046,18.3173066102531,0,0,0

MP,DENS,3,0.000734544492879577,	! slinch in^-3
MP,ALPX,3,6.66666666666667e-06,	! F^-1
MP,C,3,373722.969668162,	! in^2 s^-2 F^-1
MP,KXX,3,7.55607836445752,	! slinch in s^-3 F^-1
MP,RSVX,3,8.52348993288591,	! ohm cmil in^-1
MP,MURX,3,10000,

TB,HYPE,3,1,3,YEOH
TBDATA,1,101.1778793908,-35.5112881199046,18.3173066102531,0,0,0

!************************* Model Summary ********************
! Solid,	Elastomers,	matid,	1
! Solid,	Elastomers,	matid,	2
! Solid,	Elastomers,	matid,	3
!************************* End Model Summary ********************
/com,********* Frictionless Supports X *********
CMBLOCK,_FRICSUX,NODE,        9
(8i10)
       719      -725       888      -901      2963     -2975      3225     -3242
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cmsel,s,_FRICSUX
d,all,ux,0
nsel,all
/com,********* Frictionless Supports Y *********
CMBLOCK,_FRICSUY,NODE,       42
(8i10)
       456      -464       470       481       593      -613       640       697
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cmsel,s,_FRICSUY
d,all,uy,0
nsel,all
/com,********* Frictionless Supports Z *********
CMBLOCK,_FRICSUZ,NODE,       70
(8i10)
       206      -410       735      -744       747       753      -758       769
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cmsel,s,_FRICSUZ
d,all,uz,0
nsel,all
fini
/com,****************************************************************************
/com,*************************    SOLUTION       ********************************
/com,****************************************************************************
/solu
antype,0                   ! static analysis
nlgeom,on                  ! Turn on Large Deformation Effects
_thickRatio=  0     ! Ratio of thick parts in the model
eqsl,sparse,,,,,1
cntr,print,1               ! print out contact info and also make no initial contact an error
cncheck,dmp		!	Enable program controlled contact splitting for distributed memory parallel run
dmpoption,emat,no             ! Don't combine emat file for DANSYS
dmpoption,esav,no             ! Don't combine esav file for DANSYS
nldiag,cont,iter           ! print out contact info each equilibrium iteration
rescontrol,define,last,last,,dele	   ! Program Controlled
/com,****************************************************
/com,******************* SOLVE FOR LS 1 OF 1 ****************
/com,*** Set Displacements ***
CMBLOCK,_CM89UX_XP,NODE,       10
(8i10)
       465      -470       480       746      -759      2411     -2422      2442
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cmsel,s,_CM89UX_XP
d,all,ux,1.96850393700787
nsel,all

/com,*** Component For All Non-Zero UX Displacements ***
cmsel,s,_CM89ux_xp
cm,_DISPNONZEROUX,NODE
nsel,all

autots,on                   ! User turned on automatic time stepping
nsub,10,50,5,OFF
time,1.
outres,erase
outres,all,none
outres,nsol,all,
outres,rsol,all
outres,eangl,all
outres,etmp,all
outres,veng,all
outres,nload,all,
outres,strs,all,
outres,bkstr,all,
outres,epel,all,
outres,eppl,all,
outres,cont,all,
outres,nldat,all,
stabilize,off                   ! Stabilization turned OFF by user
! *********** WB SOLVE COMMAND ***********
! check interactive state
*get,ANSINTER_,active,,int
*if,ANSINTER_,ne,0,then
/eof
*endif
solve
/com *************** Write FE CONNECTORS *********
CEWRITE,file,ce,,INTE
/com,****************************************************
/com,*************** FINISHED SOLVE FOR LS 1 *************
fini
save,file,db
*get,_NSOLTHREADS,active,0,ntfs
*get,_NSOLPROCESSES,active,0,npfs
/post1
fini
