// COMSOL Multiphysics 6.4.0.343 model "Cantilever.mph"
// Outline of the model tree

Parameters
  L = 1 [m]
  F1 = 0 [N]
  F2 = 0 [N]
  Fcr = B * pi^2 / (4 * L^2)
  B = 1 [N * m^2]

Geometry
  geom1 "Geometry 1" (1D, length unit m)
    i1: Interval | coord = {0, L}
    fin: Finalize "Form Union"

Physics
  w: WeakFormPDE on all domains
    dependent variable alpha
    ShapeProperty.order = 2
    EquationForm.form = Automatic
    wfeq1: WeakFormPDE (default)
      weak = -B * d(alpha, x) * d(test(alpha), x) - F1 *sin(alpha) *test(alpha) + F2 * cos(alpha)*test(alpha)
    init1: init "Initial Values 1" (default)
    zflx1: ZeroFluxBoundary "Zero Flux 1" (default)
    dir1: DirichletBoundary "Dirichlet Boundary Condition 1" on boundaries 1 | r = 0

Mesh
  mesh1 "Mesh 1" (physics-controlled)
    size: MeshSizeDefault | hauto = 4

Studies
  std1 "Study 1"
    stat: Stationary | useparam = on; pname = F2; plistarr = range(0,-0.1,-1); punit = N

Solver configurations
  sol1 "Solution 1" (study std1)
    v1: Variables "Dependent Variables 1"
    s1: Stationary "Stationary Solver 1"
      dDef: Direct
      p1: Parametric
      fc1: FullyCoupled

Datasets
  dset1: Solution | solution = sol1

Plots
  pg1: PlotGroup1D "Weak Form PDE" | data = dset1
    lngr1: LineGraph on domains 1 | expr = alpha; xdata = expr; xdataexpr = x
  pg3: PlotGroup1D "1D Plot Group 3" | data = dset1