// COMSOL Multiphysics 6.4.0.343 model "CouetteAndPoiseuille.mph"
// Outline of the model tree

Parameters
  length = 1[m]
  height = 0.1[m]
  U = 0.1[m/s]  // upper plate velocity
  pin = 0.1[Pa]
  pout = 0[Pa]
  rho = 1000[kg/m^3]
  mu = 1[mPa*s]
  Re = rho*U*height/mu
  L = length
  H = height

Geometry
  geom1 "Geometry 1" (2D, length unit m)
    r1: Rectangle | size = {length, height}
    fin: Finalize "Form Union"

Physics
  spf: LaminarFlow on all domains
    dependent variable u = {u, v, w}
    ShapeProperty.order_fluid = 2
    fp1: FluidProperties (default) | rho_mat = userdef; rho = rho; mu_mat = userdef; mu = mu
    init1: init "Initial Values 1" (default)
    wallbc1: WallBC "Wall 1" (default)
    wallbc2: WallBC "Wall 2" on boundaries 3 | uvw = U; SlidingWall = 1
    inl1: InletBoundary "Inlet 1" on boundaries 1 | BoundaryCondition = Pressure; p0 = pin
    out1: OutletBoundary "Outlet 1" on boundaries 4 | p0 = pout

Mesh
  mesh1 "Mesh 1" (physics-controlled)
    size: MeshSizeDefault | table = cfd; hauto = 6

Studies
  std1 "Study 1"
    stat: Stationary | useparam = on; pname = pin; plistarr = range(0,0.1,1); punit = Pa

Solver configurations
  sol1 "Solution 1" (study std1)
    v1: Variables "Dependent Variables 1"
    s1: Stationary "Stationary Solver 1"
      p1: Parametric
      fc1: FullyCoupled | linsolver = d1; initstep = 0.01; maxiter = 100
      d1: Direct "Direct, fluid flow variables (spf)" | linsolver = pardiso; pivotperturb = 1.0E-13

Datasets
  dset1: Solution | solution = sol1

Plots
  pg1: PlotGroup2D "Velocity (spf)" | data = dset1
    surf1: Surface | expr = spf.U
  pg2: PlotGroup2D "Pressure (spf)" | data = dset1
    con1: Contour | expr = p; levelrounding = off
  pg3: PlotGroup1D "1D Plot Group 3" | data = dset1
    lngr1: LineGraph "velocity at inlet" on boundaries 1 | data = dset1; expr = spf.U
  pg4: PlotGroup1D "1D Plot Group 4" | data = dset1
    lngr1: LineGraph "velocity at outlet" on boundaries 4 | expr = spf.U; xdata = reversedarc