// COMSOL Multiphysics 6.2.0.415 model "LinearElasticPrism.mph"
// Outline of the model tree

Parameters
  L = 1[m]  // Length
  W = 0.1[m]  // Width
  H = 0.1[m]  // Height
  Ey = 10^6[Pa]  // Young modulus for silicone rubber
  nu = .49  // Poisson ratio
  para = 1  // loading parameter, range=(0,1)
  theta = 30*pi/180  // 30 deg torsion anglee in rad
  RefForce = 3*B/(L^2)  // Tip bending force producing displacement =L in a cantilever
  B = Ey*W*H^3/12  // bending stiffness

Functions
  an1: Analytic

Geometry
  geom1 "Geometry 1" (3D, length unit m)
    blk1: Block | size = {L, W, H}
    ls1: LineSegment "Line Segment 1 (mid-axis)"
      specify1 = coord
      coord1 = {0, W/2, H/2}
      specify2 = coord
      coord2 = {L, W/2, H/2}
    pt1: Point | p = {, , H/2}
    fin: Finalize "Form Union"

Physics
  solid: SolidMechanics on all domains
    dependent variable u = {u, v, w}
    lemm1: LinearElasticModel "Linear Elastic Material 1" (default)
      E_mat = userdef
      E = Ey
      nu_mat = userdef
      nu = nu
      geometricNonlinearity = linear
    free1: Free (default)
    init1: init "Initial Values 1" (default)
    fix1: Fixed "Fixed Constraint 1" on boundaries 1
    roll1: Roller (disabled) on boundaries 1
    disp1: Displacement2 "Prescribed Displacement 1 (extension)" on boundaries 6
      Direction = {prescribed, prescribed, prescribed}
      U0 = {para*L, 0, 0}
    bndl1: BoundaryLoad "Boundary Load 1 (extension)" (disabled) on boundaries 6 | FperArea = {para*Ey, 0, 0}
    disp2: Displacement2 "Prescribed Displacement 2 (torsion)" (disabled) on boundaries 6
      Direction = {free, prescribed, prescribed}
      U0 = {para*L, -para*(theta*(z-H/2)), para*(theta*(y-W/2))}
    bndl2: BoundaryLoad "Boundary Load 2 (bending)" (disabled) on boundaries 6
      LoadType = TotalForce
      Ftot = {0, 0, -para*25}
      FperArea = {0, -para*RefForce/(W*H), 0}
    disp3: Displacement0 "Prescribed Displacement 3 (fixed center)" (disabled) on points 4
      Direction = {prescribed, prescribed, prescribed}
    disp4: Displacement0 "Prescribed Displacement 4" (disabled) on points 2 | Direction = {free, free, prescribed}
    disp5: Displacement2 "Prescribed Displacement 5 (base, alt for torsion)" (disabled) on boundaries 1
      Direction = {free, prescribed, prescribed}
    rms1: RigidMotionSuppression (disabled) on all domains
      contributingPoints = fromSelection
      PointSelection: points 1, 3, 5, 6

Mesh
  mesh1 "Mesh 1" (physics-controlled)

Studies
  std1 "Study 1 (extension)"
    stat: Stationary | useparam = on; pname = para; plistarr = range(0,0.1,1)
  std2 "Study 2 (torsion)"
    stat: Stationary | useparam = on; pname = para; plistarr = range(0,0.1,1)
  std3 "Study 3 (bending)"
    stat: Stationary | useparam = on; pname = para; plistarr = range(0,0.1,1)

Solver configurations
  sol1 "Solution 1" (study std1)
    v1: Variables "Dependent Variables 1"
    s1: Stationary "Stationary Solver 1"
      p1: Parametric
      fc1: FullyCoupled | linsolver = d1
      d1: Direct "Suggested Direct Solver (solid)" | linsolver = pardiso; pivotperturb = 1.0E-9; nliniterrefine = on
  sol2 "Solution 2" (study std2)
    v1: Variables "Dependent Variables 1"
    s1: Stationary "Stationary Solver 1"
      p1: Parametric
      fc1: FullyCoupled | linsolver = d1
      d1: Direct "Suggested Direct Solver (solid)" | linsolver = pardiso; pivotperturb = 1.0E-9
  sol3 "Solution 3" (study std3)
    // same settings as sol2

Datasets
  dset1: Solution | solution = sol1
  dset2: Solution | solution = sol2
  surf1: Surface "Surface 1 (tip)" on boundaries 6 | data = dset2
  dset3: Solution | solution = sol3
  cpl1: CutPlane | data = dset2; quickx = L/2
  surf2: Surface "Surface 2 (base)" on boundaries 1 | data = dset2

Plots
  pg1: PlotGroup3D "Stress (solid) (extension)" | data = dset1
    surf1: Surface | expr = solid.mises; descr = von Mises stress
      def: Deform "Deformation" | expr = {u, v, w}; descr = Displacement field
  pg2: PlotGroup3D "Stress (solid) (torsion)" | data = dset2
    surf1: Surface | expr = solid.mises
      def: Deform "Deformation" | expr = {u, v, w}; descr = Displacement field
  pg3: PlotGroup3D "Stress (solid) (bending)" | data = dset3
    surf1: Surface | expr = solid.mises
      def: Deform "Deformation" | expr = {u, v, w}; descr = Displacement field
  pg4: PlotGroup3D "Boundary Loads (solid)" | data = dset2
    arws1: ArrowSurface "Boundary Load 2 (bending)" | expr = {solid.bndl2.F_Ax, solid.bndl2.F_Ay, solid.bndl2.F_Az}
      col: Color "Color Expression" | expr = solid.bndl2.F_A_Mag
      def: Deform "Deformation" | expr = {u, v, w}; descr = Displacement field
    surf1: Surface "Gray Surfaces" | expr = 1
      def: Deform "Deformation" | expr = {u, v, w}; descr = Displacement field
      sel1: Selection on boundaries 1-6
      tran1: Transparency | transparency = 0.8
  pg5: PlotGroup1D "1D Plot Group 5 (numerical bending deflection)" | data = dset3
    lngr1: LineGraph on edges 7 | expr = w; descr = Displacement field, Z component
  pg6: PlotGroup1D "1D Plot Group 6 (analytical bending deflection)" | data = dset3
    lngr1: LineGraph on edges 7 | data = dset3; expr = -(3*L*(x)^2-(x)^3)/(6*B)*para*25[N]; unit = m
  pg9: PlotGroup3D "3D Plot Group 9 (traction on cross section)" | data = cpl1
    arws1: ArrowSurface "Tractions" | data = cpl1; expr = {solid.sx, solid.sxy, solid.sxz}; descr = Tractions
    surf1: Surface | data = cpl1; expr = solid.mises; descr = von Mises stress
  pg7: PlotGroup2D "2D Plot Group 7 (normal stress on cross section)" | data = cpl1
    con1: Contour | data = cpl1; expr = solid.sx; descr = Stress tensor, x component
  pg8: PlotGroup2D "2D Plot Group 8 (tangential stress on cross section)" | data = cpl1
    arws1: ArrowSurface | data = cpl1; planecoordsys = cartesian; expr = {0, solid.sxy, solid.sxz}
    surf1: Surface | data = cpl1; expr = solid.sxz; descr = Stress tensor, xz component
  pg10: PlotGroup2D "2D Plot Group (normal stress at base)" | data = surf2
    con1: Contour | data = cpl1; expr = solid.sx; descr = Stress tensor, x component
  pg11: PlotGroup2D "2D Plot Group (normal stress at tip)" | data = surf2
    con1: Contour | data = surf1; expr = solid.sx; descr = Stress tensor, x component
  pg12: PlotGroup2D "2D Plot Group 12 (displacements cross section)" | data = cpl1
    surf1: Surface | data = cpl1; expr = u
    arws1: ArrowSurface | data = cpl1; expr = {v, w}