// COMSOL Multiphysics 6.4.0.378 model "Mio.mph"
// Outline of the model tree

Parameters
  L = 1[m]  // Length
  W = 0.1[m]  // Width
  H = 0.1[m]  // Height
  Ey = 10^6[Pa]  // Young modulus for silicone rubber
  nu = .49  // Poisson ratio
  para = 1  // loading parameter, range=(0,1)
  theta = 30*pi/180  // 30 deg torsion anglee in rad
  RefForce = 3*B/(L^2)  // Tip bending force producing displacement =L in a cantilever
  B = Ey*W*H^3/12  // bending stiffness

Geometry
  geom1 "Geometry 1" (3D, length unit m)
    blk1: Block | size = {L, W, H}
    ls1: LineSegment | specify1 = coord; coord1 = {0, W/2, H/2}; specify2 = coord; coord2 = {L, H/2, W/2}
    pt1: Point | p = {, , H/2}
    fin: Finalize "Form Union"

Physics
  solid: SolidMechanics on all domains
    dependent variable u = {u, v, w}
    lemm1: LinearElasticModel "Linear Elastic Material 1" (default)
      E_mat = userdef
      E = Ey
      nu_mat = userdef
      nu = nu
      rho_mat = from_mat
      geometricNonlinearity = linear
    free1: Free (default)
    init1: init "Initial Values 1" (default)
    bndl1: BoundaryLoad "Boundary Load (Bending)" (disabled) on boundaries 6
      forceType = TotalForce
      forceReferenceArea = {0, 0, -25*para}
      force = {0, 0, -para*25}
    disp1: Displacement2 "Prescribed Displacement (Estensione)" on boundaries 6
      Direction = {prescribed, prescribed, prescribed}
      U0 = {para*L, 0, 0}
    fix1: Fixed "Fixed Constraint 1" on boundaries 1
    disp2: Displacement2 "Prescribed Displacement (Torsione)" (disabled) on boundaries 6
      Direction = {free, prescribed, prescribed}
      U0 = {0, -para*(theta*(z-H/2)), para*(theta*(y-H/2))}

Mesh
  mesh1 "Mesh 1" (physics-controlled)

Studies
  std1 "Study 1 (Extension)"
    stat: Stationary | geometricNonlinearity = on; useparam = on; pname = para; plistarr = range(0,0.1,1)
  std2 "Study 2 (Bending Lineare)"
    stat: Stationary "Stationary (Lineare)" | useparam = on; pname = para; plistarr = range(0,0.1,1)
  std3 "Study 3 (Bending Non Lineare)"
    stat: Stationary "Stationary (Bending non lineare)"
      geometricNonlinearity = on
      useparam = on
      pname = para
      plistarr = range(0,0.1,1)
  std4 "Study 4 (Torsione)"
    stat: Stationary "Stationary (Torsion)" | useparam = on; pname = para; plistarr = range(0,0.1,1)

Solver configurations
  sol1 "Solution 1" (study std1)
    v1: Variables "Dependent Variables 1"
    s1: Stationary "Stationary Solver 1"
      p1: Parametric
      fc1: FullyCoupled
      d1: Direct "Suggested Direct Solver (solid)"
  sol2 "Solution 2" (study std2)
    // same settings as sol1
  sol4 "Solution 4" (study std3)
    // same settings as sol1
  sol5 "Solution 5" (study std4)
    // same settings as sol1

Datasets
  dset1: Solution | solution = sol1
  dset2: Solution | solution = sol2
  dset3: Solution | solution = sol4
  dset4: Solution | solution = sol5

Plots
  pg1: PlotGroup3D "Stress (Extension)" | data = dset1
    surf1: Surface | expr = solid.mises
      def1: Deform "Deformation 1" | expr = {u, v, w}
  pg3: PlotGroup1D "Bending Lineare vs Non-Lineare" | data = dset2
    lngr1: LineGraph on edges 7 | data = dset2; expr = w
    lngr2: LineGraph on edges 7 | data = dset3; expr = w
  pg4: PlotGroup3D "Stress (Non-Linear bending)" | data = dset3
    surf1: Surface | expr = solid.mises
      def1: Deform "Deformation 1" | expr = {u, v, w}
  pg2: PlotGroup3D "Stress (Linear Bending)" | data = dset2
    surf1: Surface | expr = solid.mises
      def1: Deform "Deformation 1" | expr = {u, v, w}
  pg5: PlotGroup3D "Stress (Torsione)" | data = dset4
    surf1: Surface | expr = solid.mises
      def1: Deform "Deformation 1" | expr = {u, v, w}