// COMSOL Multiphysics 6.4.0.343 model "ela_th_timoshenko_class.mph"
// Outline of the model tree

Parameters
  L = 5[m]
  H = 0.1[m]
  W = 1[m]
  E = 1[GPa]  // Young
  nu = 0.0  // Poisson
  rho = 1000[kg/m^3]  // Density
  Fref = 3*E*I/L^2
  I = W*H^3/12  // Inertia Moment x Axis
  para = 0
  alpha1 = 0.01[1/K]  // Coefficient of thermal expansion
  Tlower = 290[K]
  Tupper = 300[K]
  alpha2 = 0.02[1/K]
  M0 = 3/2*(alpha2-alpha1)*(Tupper-Tlower)/H*E*I  // case Fig 6 Timoshenko article
  R = 9/4 * E * I / H / L * (alpha2 - alpha1)*(Tupper-Tlower)  // case Fig 8 Timoshenko article
  M1 = 9/4*(alpha2-alpha1)*(Tupper-Tlower)/H*E*I  // case Fig 8 Timoshenko article

Geometry
  geom1 "Geometry 1" (3D, length unit m)
    blk1: Block | size = {L, W, H}; pos = {0, 0, -H/2}
    wp1: WorkPlane | unite = on
    pard1: PartitionDomains | domain = blk1(1) domains 1; workplane = wp1
    pt1: Point | p = {L, W/2, }
    fin: Finalize "Form Union"

Physics
  solid: SolidMechanics on all domains
    dependent variable u = {u, v, w}
    StructuralTransientBehavior.StructuralTransientBehavior = Quasistatic
    lemm1: LinearElasticModel "Linear Elastic Material 1" (default) | E_mat = userdef; E = E; nu_mat = userdef; nu = nu
      te1: ThermalExpansion on domains 1
        alpha_mat = userdef
        alpha = alpha2
        minput_strainreferencetemperature = Tlower
        minput_temperature = Tupper
      te2: ThermalExpansion on domains 2
        alpha_mat = userdef
        alpha = alpha1
        minput_strainreferencetemperature = Tlower
        minput_temperature = Tupper
    free1: Free (default)
    init1: init "Initial Values 1" (default)
    fix1: Fixed "Fixed Constraint 1" on boundaries 1, 4
    disp1: Displacement2 "Prescribed Displacement 1" (disabled) on boundaries 10, 11
      Direction = {free, free, prescribed}
    fix2: Fixed "Fixed Constraint 2" on boundaries 10, 11

Mesh
  mesh1 "Mesh 1" (physics-controlled)
    size: MeshSizeDefault | hauto = 1

Studies
  std1 "Study 1"
    stat: Stationary

Solver configurations
  sol1 "Solution 1" (study std1)
    v1: Variables "Dependent Variables 1"
    s1: Stationary "Stationary Solver 1"
      fc1: FullyCoupled
      d1: Direct "Suggested Direct Solver (solid)"

Datasets
  dset1: Solution | solution = sol1

Evaluation groups
  eg1: EvaluationGroup | data = dset1
    int1: IntSurface "Surface Integration 1" on boundaries 1, 4
      expr = solid.RMy
      unit = N*m
      descr = M0/M1 (params) - Reaction moment, y-component
    int2: IntSurface "Surface Integration 2" on boundaries 10, 11
      expr = solid.RFz
      unit = N
      descr = R (params) - Reaction force, z-component

Plots
  pg1: PlotGroup3D "Stress (solid)" | data = dset1
    vol1: Volume | expr = solid.misesGp
      def: Deform "Deformation" | expr = {u, v, w}; descr = Displacement field