// COMSOL Multiphysics 6.4.0.343 model "pitchfork_ns.mph"
// Outline of the model tree

Parameters
  h1u = 0.5[m]
  h1l = -0.5[m]
  h2u = 1.51[m]
  h2l = -1.5[m]
  l1 = 5[m]
  l2 = 2[m]
  l3 = 20[m]
  rho = 1000[kg/m^3]
  mu = 1[mPa*s]  // Dynamic Viscosity
  Re = 80  // Reynolds Number
  U = Re*mu/rho/(h1u-h1l)

Geometry
  geom1 "Geometry 1" (2D, length unit m)
    pol1: Polygon | source = table; table = {{l1, h1u}, {l1, h1l}, {l1+l2, h2l}, {l1+l2, h2u}}
    r1: Rectangle | size = {l1, h1u-h1l}; pos = {0, h1l}
    r2: Rectangle | size = {l3, h2u-h2l}; pos = {l1+l2, h2l}
    uni2: Union | input = pol1, r1, r2; intbnd = off; edge = all
    fil1: Fillet | point = uni2(1) points 3-6; radius = 0.5
    pt1: Point | p = {l1-0.25, }
    fin: Finalize "Form Union"

Physics
  spf: LaminarFlow on all domains
    dependent variable u = {u, v, w}
    ShapeProperty.order_fluid = 2
    fp1: FluidProperties (default) | rho_mat = userdef; rho = rho; mu_mat = userdef; mu = mu
    init1: init "Initial Values 1" (default)
    wallbc1: WallBC "Wall 1" (default)
    out1: OutletBoundary "Outlet 1" on boundaries 8
    inl1: InletBoundary "Inlet 1" on boundaries 1 | U0in = U

Mesh
  mesh1 "Mesh 1" (physics-controlled)
    size: MeshSizeDefault | table = cfd; hauto = 6

Studies
  std1 "Study 1"
    stat: Stationary | useparam = on; pname = Re; plistarr = range(10,5,100)

Solver configurations
  sol1 "Solution 1" (study std1)
    v1: Variables "Dependent Variables 1"
    s1: Stationary "Stationary Solver 1"
      p1: Parametric
      fc1: FullyCoupled
      d1: Direct "Direct, fluid flow variables (spf)"

Datasets
  dset1: Solution | solution = sol1

Plots
  pg1: PlotGroup2D "Velocity (spf)" | data = dset1
    surf1: Surface | expr = spf.U
    str1: Streamline | expr = {u, v}
  pg2: PlotGroup2D "Pressure (spf)" | data = dset1
    con1: Contour | expr = p; levelrounding = off
  pg3: PlotGroup1D "1D Plot Group 3" | data = dset1
    ptgr1: PointGraph on points 3 | expr = v