// COMSOL Multiphysics 6.4.0.378 model "Progetto_Mambrini_Meconi.mph"
// Outline of the model tree

Parameters
  R_inner = 300[um]  // Semiax asse r dell'Inner Core (forma ellissoidale)
  R_bulb = 5[um]  // Raggio bulbo terminale
  R_neur = 1.5[um]  // Raggio del neurite
  L_neur = 600[um]  // Lunghezza neurite
  W_filo = 1.6[um]  // Width filopode
  H_filo = 0.6[um]  // Height filopode
  t_flu = 5[um]  // Spessore fluido interlamellare
  E_neur = 7[kPa]  // Module Neurite
  E_inner = E_neur*100  // Module Inner core
  E_lam = 1[kPa]  // Module Lamella
  E_flu = 1[Pa]  // Module ViscoElastic Mat
  nu_nil = 0.49  // Poisson Neur, Inner, Lam
  nu_flu = 0.4  // Poisson Flu
  Shear_flu = 3[kPa]  // Shear Module Viscoelastic mat
  tau_flu = 7e-5[s]
  alfa = 0.9  // coefficient weibull
  beta = 2.5  // coefficient weibull
  N_lam = 30
  t_lmin = 0.1[um]  // min thickness lamelle
  t_lmax = 0.4[um]  // max thickness lamelle
  start_rect = 10  // start time rect
  end_rect = 50  // end time rect
  rho_nilf = 1000[kg*m^-3]  // density all
  f = 150[Hz]
  Cm = 1[uF/cm^2]  // membrane specific capacity
  GNa = 180[mS/cm^2]  // Na max conductance
  GK = 36[mS/cm^2]  // K max conductance
  GL = 0.3[mS/cm^2]  // leaky conductance
  VNa = 55[mV]  // Na Nernst potential
  VK = -72[mV]  // K Nernst potential
  VL = -49.387[mV]  // leaky potential
  sigma_i = 1.6667[mS/cm]  // intracellular conductivity
  Vrest = -60[mV]
  p0 = 220[Pa]  // baseline value
  base = 0.011  // activation function
  A_stim_rect = 2.5
  A_stim_sine = 1.15

Functions
  rect1: Rectangle | lower = start_rect; upper = end_rect; amplitude = A_stim_rect; smooth = 1; plotlowerlimit = -30; plotupperlimit = 90
  an1: Analytic "Weibull Function" | funcname = wb; expr = t_lmin+(t_lmax-t_lmin)*(1-exp(-(n/(alfa*N_lam))^beta)); args = n; argunit = 1

Variables
  var1 "Variables Auxiliary Function"
    C_right = -int_outer(cos(2*phi_angle))/int_outer(1)
    phi_angle = atan2(r,z-R_inner)
  var2 "Variables Hodgkin Hauxley"
    INa = GNa*M^3*H*(Vm-VNa)
    IK = GK*N^4*(Vm-VK)
    IL = GL*(Vm-VL)
    Iion = INa+IK+IL
    alpha_m = k_temp*(0.1 * (25 - vm/1[mV])) / (exp(0.1 * (25 - vm/1[mV])) - 1) * 1[1/ms]
    beta_m = k_temp*4 * exp(-vm/18[mV]) * 1[1/ms]
    alpha_h = k_temp*0.07 * exp(-vm/20[mV]) * 1[1/ms]
    beta_h = k_temp*1 / (exp((30 - vm/1[mV]) / 10) + 1) * 1[1/ms]
    alpha_n = k_temp*(0.01 * (10 - vm/1[mV])) / (exp((10 - vm/1[mV]) / 10) - 1) * 1[1/ms]
    beta_n = k_temp*0.125 * exp(-vm/80[mV]) * 1[1/ms]
    vm = Vm-Vrest
    k_temp = 5
  var3 "Variables Density Current Source"
    I_max = 300[uA/cm^2]
    I_stim1 = I_max/(1 + exp(-800 * (max_Fil1(solid.ep1)- base)))
    I_stim2 = I_max/(1 + exp(-800 * (max_Fil2(solid.ep1)- base)))
    I_stim3 = I_max/(1 + exp(-800 * (max_Fil3(solid.ep1)- base)))

Couplings
  intop1: Integration on boundaries 174, 176 | opname = int_outer; axisym = on
  maxop3: Maximum "Maximum Filopodio 1" on boundaries 41, 72 | opname = max_Fil1
  maxop4: Maximum "Maximum Filopodio 2" on boundaries 109-111 | opname = max_Fil2
  maxop1: Maximum "Maximum Filopodio 3" on boundaries 106, 108, 112 | opname = max_Fil3

Geometry
  geom1 "Geometry 1" (2D axisymmetric, length unit µm)
    e62: Ellipse "Flu 30"
      semiaxes = {R_inner+R_bulb/2+W_filo/2+0.08[um]+30*t_flu, L_neur/2+30*t_flu}
      angle = 180
      pos = {0, L_neur/2+R_bulb/2+W_filo/2}
      rot = -90
      iscircularsectorold = on
    e60: Ellipse "Flu 29"
      semiaxes = {R_inner+R_bulb/2+W_filo/2+0.08[um]+29*t_flu, L_neur/2+29*t_flu}
      angle = 180
      pos = {0, L_neur/2+R_bulb/2+W_filo/2}
      rot = -90
      iscircularsectorold = on
    e58: Ellipse "Flu 28"
      semiaxes = {R_inner+R_bulb/2+W_filo/2+0.08[um]+28*t_flu, L_neur/2+28*t_flu}
      angle = 180
      pos = {0, L_neur/2+R_bulb/2+W_filo/2}
      rot = -90
      iscircularsectorold = on
    e56: Ellipse "Flu 27"
      semiaxes = {R_inner+R_bulb/2+W_filo/2+0.08[um]+27*t_flu, L_neur/2+27*t_flu}
      angle = 180
      pos = {0, L_neur/2+R_bulb/2+W_filo/2}
      rot = -90
      iscircularsectorold = on
    e54: Ellipse "Flu 26"
      semiaxes = {R_inner+R_bulb/2+W_filo/2+0.08[um]+26*t_flu, L_neur/2+26*t_flu}
      angle = 180
      pos = {0, L_neur/2+R_bulb/2+W_filo/2}
      rot = -90
      iscircularsectorold = on
    e52: Ellipse "Flu 25"
      semiaxes = {R_inner+R_bulb/2+W_filo/2+0.08[um]+25*t_flu, L_neur/2+25*t_flu}
      angle = 180
      pos = {0, L_neur/2+R_bulb/2+W_filo/2}
      rot = -90
      iscircularsectorold = on
    e50: Ellipse "Flu 24"
      semiaxes = {R_inner+R_bulb/2+W_filo/2+0.08[um]+24*t_flu, L_neur/2+24*t_flu}
      angle = 180
      pos = {0, L_neur/2+R_bulb/2+W_filo/2}
      rot = -90
      iscircularsectorold = on
    e48: Ellipse "Flu 23"
      semiaxes = {R_inner+R_bulb/2+W_filo/2+0.08[um]+23*t_flu, L_neur/2+23*t_flu}
      angle = 180
      pos = {0, L_neur/2+R_bulb/2+W_filo/2}
      rot = -90
      iscircularsectorold = on
    e46: Ellipse "Flu 22"
      semiaxes = {R_inner+R_bulb/2+W_filo/2+0.08[um]+22*t_flu, L_neur/2+22*t_flu}
      angle = 180
      pos = {0, L_neur/2+R_bulb/2+W_filo/2}
      rot = -90
      iscircularsectorold = on
    e44: Ellipse "Flu 21"
      semiaxes = {R_inner+R_bulb/2+W_filo/2+0.08[um]+21*t_flu, L_neur/2+21*t_flu}
      angle = 180
      pos = {0, L_neur/2+R_bulb/2+W_filo/2}
      rot = -90
      iscircularsectorold = on
    e42: Ellipse "Flu 20"
      semiaxes = {R_inner+R_bulb/2+W_filo/2+0.08[um]+20*t_flu, L_neur/2+20*t_flu}
      angle = 180
      pos = {0, L_neur/2+R_bulb/2+W_filo/2}
      rot = -90
      iscircularsectorold = on
    e40: Ellipse "Flu 19"
      semiaxes = {R_inner+R_bulb/2+W_filo/2+0.08[um]+19*t_flu, L_neur/2+19*t_flu}
      angle = 180
      pos = {0, L_neur/2+R_bulb/2+W_filo/2}
      rot = -90
      iscircularsectorold = on
    e38: Ellipse "Flu 18"
      semiaxes = {R_inner+R_bulb/2+W_filo/2+0.08[um]+18*t_flu, L_neur/2+18*t_flu}
      angle = 180
      pos = {0, L_neur/2+R_bulb/2+W_filo/2}
      rot = -90
      iscircularsectorold = on
    e36: Ellipse "Flu 17"
      semiaxes = {R_inner+R_bulb/2+W_filo/2+0.08[um]+17*t_flu, L_neur/2+17*t_flu}
      angle = 180
      pos = {0, L_neur/2+R_bulb/2+W_filo/2}
      rot = -90
      iscircularsectorold = on
    e34: Ellipse "Flu 16"
      semiaxes = {R_inner+R_bulb/2+W_filo/2+0.08[um]+16*t_flu, L_neur/2+16*t_flu}
      angle = 180
      pos = {0, L_neur/2+R_bulb/2+W_filo/2}
      rot = -90
      iscircularsectorold = on
    e32: Ellipse "Flu 15"
      semiaxes = {R_inner+R_bulb/2+W_filo/2+0.08[um]+15*t_flu, L_neur/2+15*t_flu}
      angle = 180
      pos = {0, L_neur/2+R_bulb/2+W_filo/2}
      rot = -90
      iscircularsectorold = on
    e30: Ellipse "Flu 14"
      semiaxes = {R_inner+R_bulb/2+W_filo/2+0.08[um]+14*t_flu, L_neur/2+14*t_flu}
      angle = 180
      pos = {0, L_neur/2+R_bulb/2+W_filo/2}
      rot = -90
      iscircularsectorold = on
    e28: Ellipse "Flu 13"
      semiaxes = {R_inner+R_bulb/2+W_filo/2+0.08[um]+13*t_flu, L_neur/2+13*t_flu}
      angle = 180
      pos = {0, L_neur/2+R_bulb/2+W_filo/2}
      rot = -90
      iscircularsectorold = on
    e26: Ellipse "Flu 12"
      semiaxes = {R_inner+R_bulb/2+W_filo/2+0.08[um]+12*t_flu, L_neur/2+12*t_flu}
      angle = 180
      pos = {0, L_neur/2+R_bulb/2+W_filo/2}
      rot = -90
      iscircularsectorold = on
    e24: Ellipse "Flu 11"
      semiaxes = {R_inner+R_bulb/2+W_filo/2+0.08[um]+11*t_flu, L_neur/2+11*t_flu}
      angle = 180
      pos = {0, L_neur/2+R_bulb/2+W_filo/2}
      rot = -90
      iscircularsectorold = on
    e22: Ellipse "Flu 10"
      semiaxes = {R_inner+R_bulb/2+W_filo/2+0.08[um]+10*t_flu, L_neur/2+10*t_flu}
      angle = 180
      pos = {0, L_neur/2+R_bulb/2+W_filo/2}
      rot = -90
      iscircularsectorold = on
    e20: Ellipse "Flu 9"
      semiaxes = {R_inner+R_bulb/2+W_filo/2+0.08[um]+9*t_flu, L_neur/2+9*t_flu}
      angle = 180
      pos = {0, L_neur/2+R_bulb/2+W_filo/2}
      rot = -90
      iscircularsectorold = on
    e18: Ellipse "Flu 8"
      semiaxes = {R_inner+R_bulb/2+W_filo/2+0.08[um]+8*t_flu, L_neur/2+8*t_flu}
      angle = 180
      pos = {0, L_neur/2+R_bulb/2+W_filo/2}
      rot = -90
      iscircularsectorold = on
    e16: Ellipse "Flu 7"
      semiaxes = {R_inner+R_bulb/2+W_filo/2+0.08[um]+7*t_flu, L_neur/2+7*t_flu}
      angle = 180
      pos = {0, L_neur/2+R_bulb/2+W_filo/2}
      rot = -90
      iscircularsectorold = on
    e14: Ellipse "Flu 6"
      semiaxes = {R_inner+R_bulb/2+W_filo/2+0.08[um]+6*t_flu, L_neur/2+6*t_flu}
      angle = 180
      pos = {0, L_neur/2+R_bulb/2+W_filo/2}
      rot = -90
      iscircularsectorold = on
    e12: Ellipse "Flu 5"
      semiaxes = {R_inner+R_bulb/2+W_filo/2+0.08[um]+5*t_flu, L_neur/2+5*t_flu}
      angle = 180
      pos = {0, L_neur/2+R_bulb/2+W_filo/2}
      rot = -90
      iscircularsectorold = on
    e10: Ellipse "Flu 4"
      semiaxes = {R_inner+R_bulb/2+W_filo/2+0.08[um]+4*t_flu, L_neur/2+4*t_flu}
      angle = 180
      pos = {0, L_neur/2+R_bulb/2+W_filo/2}
      rot = -90
      iscircularsectorold = on
    e8: Ellipse "Flu 3"
      semiaxes = {R_inner+R_bulb/2+W_filo/2+0.08[um]+3*t_flu, L_neur/2+3*t_flu}
      angle = 180
      pos = {0, L_neur/2+R_bulb/2+W_filo/2}
      rot = -90
      iscircularsectorold = on
    e6: Ellipse "Flu 2"
      semiaxes = {R_inner+R_bulb/2+W_filo/2+0.08[um]+2*t_flu, L_neur/2+2*t_flu}
      angle = 180
      pos = {0, L_neur/2+R_bulb/2+W_filo/2}
      rot = -90
      iscircularsectorold = on
    e3: Ellipse "Flu 1"
      semiaxes = {R_inner+R_bulb/2+W_filo/2+0.08[um]+1*t_flu, L_neur/2+1*t_flu}
      angle = 180
      pos = {0, L_neur/2+R_bulb/2+W_filo/2}
      rot = -90
      iscircularsectorold = on
    r1: Rectangle "Neurita" | size = {R_neur, L_neur}
    r5: Rectangle "Neurita ext" | size = {R_neur, 250[um]}; pos = {R_neur, 0}; rot = 180
    c1: Circle "Bulbo terminale" | r = R_bulb; angle = 180; pos = {0, L_neur}; rot = -90; iscircularsectorold = on
    r2: Rectangle "Filopodio prox-dist" | size = {W_filo, H_filo}; pos = {R_neur, L_neur/2}
    r3: Rectangle "Filopodio bulb 0°" | size = {W_filo, H_filo/2}; pos = {H_filo/2, L_neur+R_bulb-0.018[um]}; rot = 90
    r4: Rectangle "Filopodio bulb 66°"
      size = {W_filo, H_filo}
      pos = {(R_bulb-0.28[um])*sin(30[deg]), L_neur+(R_bulb-0.28[um])*(1+cos(30[deg]))/2}
      rot = 66
    e1: Ellipse "Inner Core"
      semiaxes = {R_inner+R_bulb/2+W_filo/2+0.08[um], L_neur/2}
      angle = 180
      pos = {0, L_neur/2+R_bulb/2+W_filo/2}
      rot = -90
      iscircularsectorold = on
    uni1: Union | input = c1, r1, r2, r3, r4, r5; intbnd = off; edge = all
    fin: Finalize "Form Union" | symmetriccoord = 8

Materials
  mat1: Common "Neurite" on domains 1-32
    def: def "Basic"
      density = rho_nilf
    Enu: Enu "Young's modulus and Poisson's ratio"
      E = E_neur
      nu = nu_nil
  mat2: Common "Inner core" on domains 33
    def: def "Basic"
      density = rho_nilf
    Enu: Enu "Young's modulus and Poisson's ratio"
      E = E_inner
      nu = nu_nil
  mat3: Common "Fluidic Material" on domains 34-63
    def: def "Basic"
      density = rho_nilf
    Enu: Enu "Young's modulus and Poisson's ratio"
      E = 0.5
      nu = nu_flu

Physics
  solid: SolidMechanics on all domains
    dependent variable u = {u, v, w}
    StructuralTransientBehavior.StructuralTransientBehavior = Quasistatic
    lemm1: LinearElasticModel "Linear Elastic Material 1" (default) | SolidModel = Isotropic
    axi1: AxialSymmetrySolid "Axial Symmetry 1" (default)
    free1: Free (default)
    init1: init "Initial Values 1" (default)
    fix2: Fixed "Fixed Constraint 2" on boundaries 2
    bndl1: BoundaryLoad "Boundary Load (Frequency Sweep)" (disabled) on boundaries 174, 176
      forceType = FollowerPressure
      pressure = -p0* (C_right + cos(2 * atan2(r, z - R_inner)))
    bndl2: BoundaryLoad "Boundary Load (Rect)" (disabled) on boundaries 174, 176
      forceType = FollowerPressure
      pressure = -p0* (C_right + cos(2 * atan2(r, z - R_inner)))*rect1(t[1/ms])
    bndl3: BoundaryLoad "Boundary Load (Sine)" on boundaries 174, 176
      forceType = FollowerPressure
      pressure = -p0* (C_right + cos(2 * atan2(r, z - R_inner)))*A_stim_sine*sin(2*pi*f*t)
    lemm3: LinearElasticModel "Linear Elastic Material 3" on domains 34-63
      vis1: Viscoelasticity on all domains
        MaterialModel = GeneralizedMaxwell
        Gvm = Shear_flu
        tauvm = tau_flu
        tauv = tau_v
  mbrn: StructuralMembrane "Membrane" on boundaries 144-174, 176-206
    dependent variable u2 = {u2, v2, w2}
    StructuralTransientBehavior.StructuralTransientBehavior = Quasistatic
    lemm1: LinearElasticModel "Linear Elastic Material 1" (default)
      SolidModel = Isotropic
      E_mat = userdef
      E = E_lam
      nu_mat = userdef
      nu = nu_nil
      rho_mat = userdef
      rho = 1000
    to1: ThicknessOffset "Thickness and Offset 0" (default) | d = wb(1); OffsetDefinition = NoOffset
    axi1: AxialSymmetrySolid "Axial Symmetry 1" (default)
    free1: Free (default)
    init1: init "Initial Values 1" (default)
    to2: ThicknessOffset "Thickness and Offset 1" on boundaries 145, 205 | d = wb(1); OffsetDefinition = NoOffset
    to3: ThicknessOffset "Thickness and Offset 2" on boundaries 146, 204 | d = wb(2); OffsetDefinition = NoOffset
    to4: ThicknessOffset "Thickness and Offset 3" on boundaries 147, 203 | d = wb(3); OffsetDefinition = NoOffset
    to5: ThicknessOffset "Thickness and Offset 4" on boundaries 148, 202 | d = wb(4); OffsetDefinition = NoOffset
    to6: ThicknessOffset "Thickness and Offset 5" on boundaries 149, 201 | d = wb(5); OffsetDefinition = NoOffset
    to7: ThicknessOffset "Thickness and Offset 6" on boundaries 150, 200 | d = wb(6); OffsetDefinition = NoOffset
    to8: ThicknessOffset "Thickness and Offset 7" on boundaries 151, 199 | d = wb(7); OffsetDefinition = NoOffset
    to9: ThicknessOffset "Thickness and Offset 8" on boundaries 152, 198 | d = wb(8); OffsetDefinition = NoOffset
    to10: ThicknessOffset "Thickness and Offset 9" on boundaries 153, 197 | d = wb(9); OffsetDefinition = NoOffset
    to11: ThicknessOffset "Thickness and Offset 10" on boundaries 154, 196 | d = wb(10); OffsetDefinition = NoOffset
    to12: ThicknessOffset "Thickness and Offset 11" on boundaries 155, 195 | d = wb(11); OffsetDefinition = NoOffset
    to13: ThicknessOffset "Thickness and Offset 12" on boundaries 156, 194 | d = wb(12); OffsetDefinition = NoOffset
    to14: ThicknessOffset "Thickness and Offset 13" on boundaries 157, 193 | d = wb(13); OffsetDefinition = NoOffset
    to15: ThicknessOffset "Thickness and Offset 14" on boundaries 158, 192 | d = wb(14); OffsetDefinition = NoOffset
    to16: ThicknessOffset "Thickness and Offset 15" on boundaries 159, 191 | d = wb(15); OffsetDefinition = NoOffset
    to17: ThicknessOffset "Thickness and Offset 16" on boundaries 160, 190 | d = wb(16); OffsetDefinition = NoOffset
    to18: ThicknessOffset "Thickness and Offset 17" on boundaries 161, 189 | d = wb(17); OffsetDefinition = NoOffset
    to19: ThicknessOffset "Thickness and Offset 18" on boundaries 162, 188 | d = wb(18); OffsetDefinition = NoOffset
    to20: ThicknessOffset "Thickness and Offset 19" on boundaries 163, 187 | d = wb(19); OffsetDefinition = NoOffset
    to21: ThicknessOffset "Thickness and Offset 20" on boundaries 164, 186 | d = wb(20); OffsetDefinition = NoOffset
    to22: ThicknessOffset "Thickness and Offset 21" on boundaries 165, 185 | d = wb(21); OffsetDefinition = NoOffset
    to23: ThicknessOffset "Thickness and Offset 22" on boundaries 166, 184 | d = wb(22); OffsetDefinition = NoOffset
    to24: ThicknessOffset "Thickness and Offset 23" on boundaries 167, 183 | d = wb(23); OffsetDefinition = NoOffset
    to25: ThicknessOffset "Thickness and Offset 24" on boundaries 168, 182 | d = wb(24); OffsetDefinition = NoOffset
    to26: ThicknessOffset "Thickness and Offset 25" on boundaries 169, 181 | d = wb(25); OffsetDefinition = NoOffset
    to27: ThicknessOffset "Thickness and Offset 26" on boundaries 170, 180 | d = wb(26); OffsetDefinition = NoOffset
    to28: ThicknessOffset "Thickness and Offset 27" on boundaries 171, 179 | d = wb(27); OffsetDefinition = NoOffset
    to29: ThicknessOffset "Thickness and Offset 28" on boundaries 172, 178 | d = wb(28); OffsetDefinition = NoOffset
    to30: ThicknessOffset "Thickness and Offset 29" on boundaries 173, 174, 176, 177
      d = wb(29)
      OffsetDefinition = NoOffset
    to31: ThicknessOffset "Thickness and Offset 30" on boundaries 174, 176 | d = wb(30); OffsetDefinition = NoOffset
  gb: GeneralFormBoundaryPDE "General Form Boundary PDE (Voltage)" on boundaries 41, 72, 105-112, 175, 207, 208
    dependent variable Vm
    EquationForm.form = Automatic
    Units.DependentVariableQuantity = none
    Units.CustomDependentVariableUnit = V
    Units.CustomSourceTermUnit = A/m^2
    gfeq1: GeneralFormPDE (default) | f = -Iion; Ga = {-(r/2)*sigma_i*VmTr, -(r/2)*sigma_i*VmTz}; da = Cm
    init1: init "Initial Values 1" (default) | Vm = Vrest
    src3: SourceTerm "Source Fil1" on boundaries 41, 72 | f = -Iion+I_stim1
    src2: SourceTerm "Source Fil2" on boundaries 109-111 | f = -Iion+I_stim2
    src1: SourceTerm "Source Fil3" on boundaries 106, 108, 112 | f = -Iion+I_stim3
  gb2: GeneralFormBoundaryPDE "General Form Boundary PDE (Gating variable)" on boundaries 41, 72, 105-112, 175, 207, 208
    dependent variable u3 = {N, M, H}
    EquationForm.form = Automatic
    Units.CustomSourceTermUnit = 1/s
    gfeq1: GeneralFormPDE (default)
      f = {alpha_n*(1-N)-beta_n*N, alpha_m*(1-M)-beta_m*M, alpha_h*(1-H)-beta_h*H}
      Ga = {{0, 0}, {0, 0}, {0, 0}}
      da = 1
    init1: init "Initial Values 1" (default) | N = 0.3177; M = 0.0529; H = 0.5961

Multiphysics
  sshc1: SolidShellConnection2DAxis "Solid–Thin Structure Connection 1"
    Solid_physics = solid
    Shell_physics = mbrn
    sharedBndSelection: boundaries 144-174, 176-206

Mesh
  mesh1 "Mesh 1" (physics-controlled)

Studies
  std1 "Study 1 (Sweep in Frequenza)"
    freq: Frequency "Frequency Domain" | plist = 0 range(1,10,1000); useparam = on
  std2 "Study 2 (Pressure Rect)"
    time: Transient "Time Dependent"
      tunit = ms
      tlist = range(0, 0.5, start_rect-5), range(start_rect-4.9, 0.05, start_rect+5), range(start_rect+5.1, 0.5, end_rect-5), range(end_rect-4.9, 0.05, end_rect+5), range(end_rect+5.1, 0.5, end_rect+15)
      pname = A_stim_rect
      plistarr = 4
  std3 "Study 3 (Sinusoidal f=150 Hz)"
    time1: Transient "Time Dependent"
      tunit = ms
      tlist = range(0,0.05,20)
      useparam = on
      pname = f
      plistarr = 150
      punit = 1/s
  std4 "Study 4 (Sinusoidal f = 50Hz)"
    time: Transient "Time Dependent (Sinusoidal f = 50 Hz)"
      tunit = ms
      tlist = range(0,0.05,60)
      useparam = on
      pname = f
      plistarr = 50
      punit = Hz

Solver configurations
  sol1 "Solution 1" (study std1)
    v1: Variables "Dependent Variables 1"
    s1: Stationary "Stationary Solver 1"
      dDef: Direct
      p1: Parametric
      fc1: FullyCoupled
  sol2 "Solution 2" (study std2)
    v1: Variables "Dependent Variables 1"
    t1: Time "Time-Dependent Solver 1"
      dDef: Direct
      fc1: FullyCoupled
  sol3 "Solution 3" (study std3)
    v1: Variables "Dependent Variables 1"
    t1: Time "Time-Dependent Solver 1"
      dDef: Direct
      tp1: TimeParametric
      fc1: FullyCoupled
  sol4 "Solution 4" (study std4)
    // same settings as sol3

Datasets
  dset1: Solution | solution = sol1
  dset5: Solution | solution = sol2
  dset6: Solution | solution = sol3
  dset7: Solution | solution = sol4

Plots
  pg5: PlotGroup1D "Strain - Frequency" | data = dset1; xlabel = freq (Hz); ylabel = max(solid.ep1)
    glob1: Global "Principal Strain"
      expr = {max_Fil1(solid.ep1)*100, max_Fil2(solid.ep1)*100, max_Fil3(solid.ep1)*100, }
      descr = {Maximum Filopodium 1, Maximum Filopodium 2, Maximum Filopodium 3, }
      title = Frequency behavior
      autosolution = off
  pg6: PlotGroup1D "Strain - Time Domain Rect Load"
    data = dset5
    title = Principal Strain Rect Load
    xlabel = Time (ms)
    ylabel = max(solid.ep1)
    glob1: Global "Principal Strain"
      expr = {max_Fil1(solid.ep1)*100, max_Fil2(solid.ep1)*100, max_Fil3(solid.ep1)*100}
      descr = {Maximum Filopodium 1, Maximum Filopodium 2, Maximum Filopodium 3}
  pg13: PlotGroup1D "Strain - Time Domain Sine Load (f = 150Hz)"
    data = dset6
    title = Principal Strain Sine Load (f = 150Hz)
    ylabel = max(solid.ep1)
    glob1: Global "Principal Strain"
      expr = {max_Fil1(solid.ep1)*100, max_Fil2(solid.ep1)*100, max_Fil3(solid.ep1)*100}
      descr = {Maximum Filopodium 1, Maximum Filopodium 2, Maximum Filopodium 3}
      autosolution = off
  pg14: PlotGroup1D "Strain - Time Domain Sine Load (f = 50 Hz)"
    data = dset7
    title = Principal Strain Sine Load (f = 50Hz)
    ylabel = max(solid.ep1)
    glob1: Global "Principal Strain"
      expr = {max_Fil1(solid.ep1)*100, max_Fil2(solid.ep1)*100, max_Fil3(solid.ep1)*100}
      descr = {Maximum Filopodium 1, Maximum Filopodium 2, Maximum Filopodium 3}
      autosolution = off
  pg11: PlotGroup1D "Action Potential Rect Load" | data = dset5
    ptgr1: PointGraph on points 110 | expr = Vm; unit = mV; descr = Action Potential Rect Load; autopoint = off
  pg8: PlotGroup1D "Activation Function (Rect Load)" | data = dset5; title = Stimulus generated by each filopodia )
    ptgr1: PointGraph "Corrente Filopodio 1" on points 109
      expr = I_stim1
      descr = Stimulus generated by each filopodia
      autopoint = off
      autoexpr = on
    ptgr2: PointGraph "Corrente Filopodio 2" on points 109 | expr = I_stim2; autopoint = off; autoexpr = on
    ptgr3: PointGraph "Corrente Filopodio 3" on points 109 | expr = I_stim3; autopoint = off; autoexpr = on
  pg7: PlotGroup1D "Action Potential Sinuoidal Load(f = 150Hz)"
    data = dset6
    title = Action potential Sine Load (f = 150)
    ptgr1: PointGraph on points 110 | expr = Vm; unit = mV; descr = Voltage; autopoint = off
  pg12: PlotGroup1D "Action Potential Sinuoidal Load(f = 50Hz)" | data = dset7
    ptgr1: PointGraph on points 110
      expr = Vm
      unit = mV
      descr = Voltage
      title = Action Potential Sine Load (f = 50 Hz)
      autopoint = off