// COMSOL Multiphysics 6.0.0.354 model "electrode_disc_FE.mph"
// Outline of the model tree

Parameters
  Vs = 1 [V]  // electrode potential
  sigma = 1 [S/m]  // conductivity
  Re = 5 [mm]  // electrode radius
  Zth = 1/(4*sigma*Re)  // theoretical access reistance
  Rd = 50 [mm]  // Dimenension of the hemispherical domain (rimulating r=infinite)

Variables
  var1 "Variables 1"
    Is = intop1(ec.nJ)  // Electrode current
    Jz = (2*sigma*Vs)/ ( pi*sqrt(Re^2-r^2) )  // Theoretica current density on the electrode disc
    Zs = Vs/Is  // Numerical access resistance

Couplings
  intop1: Integration on boundaries 2 | axisym = on

Geometry
  geom1 "Geometry 1" (2D axisymmetric, length unit mm)
    c2: Circle | r = Rd; angle = 90
    pol1: Polygon | source = table; table = {{0, 0}, {Re, 0}}
    fin: Finalize "Form Union"

Physics
  ec: ConductiveMedia "Electric Currents" on all domains
    dependent variable V
    cucn1: CurrentConservation (default) | sigma_mat = userdef; sigma = sigma; epsilonr_mat = userdef; epsilonr = 1
    axi1: AxialSymmetry (default)
    ein1: ElectricInsulation (default)
    init1: init "Initial Values 1" (default)
    pot1: ElectricPotential on boundaries 2 | V0 = Vs
    gnd1: Ground on boundaries 4

Mesh
  mesh1 "Mesh 1"
    size: MeshSizeDefault | hmax = 3.35; hmin = 0.015; hcurve = 0.3; hgrad = 1.3
    dis1: Distribution on boundaries 2 | numelem = 100
    ftri1: FreeTri "Free Triangular 1" on remaining entities

Studies
  std1 "Study 1"
    stat: Stationary

Solver configurations
  sol1 "Solution 1" (study std1)
    v1: Variables "Dependent Variables 1"
    s1: Stationary "Stationary Solver 1"
      dDef: Direct
      fc1: FullyCoupled | linsolver = dDef

Datasets
  dset1: Solution | solution = sol1
  rev1: Revolve2D "Revolution 2D 1" | data = dset1

Derived values
  gev1: EvalGlobal "Global Evaluation 1" | data = dset1; table = tbl1; expr = {Zs, }

Tables
  tbl1: Table
    // Global Evaluation 1
    Numerical access resistance (Ω)
    49.2666

Plots
  pg1: PlotGroup2D "Electric Potential (ec)" | data = dset1; dataisaxisym = on
    surf1: Surface | expr = V
    arwl1: ArrowLine | expr = {ec.Er, ec.Ez}
  pg2: PlotGroup3D "Electric Potential, Revolved Geometry (ec)" | data = rev1
    surf1: Surface | expr = V
  pg3: PlotGroup1D "1D Plot Group 3" | data = dset1
    lngr1: LineGraph on boundaries 2 | expr = ec.nJ; xdata = expr; xdataexpr = r; legends = Computed
    lngr2: LineGraph on boundaries 2 | expr = Jz; xdata = expr; xdataexpr = r; legends = Theoretical